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/batch
! ANSYS input file written by Workbench version 2019 R3
! File used for geometry attach: C:\Users\Wojciech\Desktop\KN PiRM LEM\Wahacz kompozytowy\Analiza MES\Izotropowa\Stal_2mm_files\dp0\SYS\DM\SYS.scdoc
/title,Stal_2mm--Static Structural (A5)
/com,--- Data in consistent MKS units. See Solving Units in the help system for more information.
/units,MKS
/prep7
! Turn off shape checking because checks already performed inside WB mesher.
! See help system for more information.
SHPP,OFF,,NOWARN
etcon,set             ! allow ANSYS to choose best KEYOP's for 180x elements
/com,*********** Nodes for the whole assembly ***********
nblock,3,,15249
(1i9,3e20.9e3)
        1     2.000000000E-02    -9.474549783E-02    -1.349751798E-01
        2     4.000000000E-02    -9.538022921E-02    -1.363153837E-01
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-1
/com,*********** Elements for Body 1 "SYS\NONE" ***********
et,1,181
keyo,1,3,2
eblock,19,solid,,13846
(19i9)
        1        1        1        1        0        0        0        0        4        0       18     5591     5526     5592     5592
        1        1        1        1        0        0        0        0        4        0       19     5472     5431     5473     5473
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-1
/com,*********** Send User Defined Coordinate System(s) ***********
csys,0
toffst,273.15,  ! Temperature offset from absolute zero
/com,*********** Set Reference Temperature ***********
tref,22.
/com,*********** Send Materials ***********
Temperature = 'TEMP' ! Temperature
MP,DENS,1,7850,	! kg m^-3
MP,ALPX,1,1.2e-05,	! C^-1
MP,C,1,434,	! J kg^-1 C^-1
MP,KXX,1,60.5,	! W m^-1 C^-1
MP,RSVX,1,1.7e-07,	! kg m^3 A^-2 s^-3
MP,EX,1,200000000000,	! Pa
MP,NUXY,1,0.3,
MP,MURX,1,10000,

/com,*********** Send Sheet Properties ***********
sectype,1,shell
secdata,4.e-003
secoff,mid

!************************* Model Summary ********************
!SYS\NONE,	Structural Steel,	matid,	1
!************************* End Model Summary ********************
/com,*********** Fixed Supports ***********
CMBLOCK,_FIXEDSU,NODE,      114
(8i10)
        71        72        73        74        75        76        77        78
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cmsel,s,_FIXEDSU
d,all,all
nsel,all
/com,********* Frictionless Supports X *********
CMBLOCK,_FRICSUX,NODE,       85
(8i10)
       291       292       293       294       295       296       297       298
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cmsel,s,_FRICSUX
d,all,ux,0
nsel,all
/com,********** Rotational Supports Y **********
CMBLOCK,_ROTSUY ,NODE,       85
(8i10)
       291       292       293       294       295       296       297       298
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cmsel,s,_ROTSUY
d,all,roty,0
nsel,all
/com,********** Rotational Supports Z **********
CMBLOCK,_ROTSUZ ,NODE,       85
(8i10)
       291       292       293       294       295       296       297       298
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cmsel,s,_ROTSUZ
d,all,rotz,0
nsel,all
/com,*********** Define Force Using Surface Effect Elements ***********
local,12,0,0.,0.,0.,0.,0.,0.
csys,0
et,2,156
keyop,2,5,1         !  No orientation node
eblock,10,,,59
(15i9)
    13847        2        2        2       12     1090     1091
    13848        2        2        2       12     1004     1090
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-1
esel,s,type,,2
keyop,2,2,1                ! Apply load in local coordinate system
keyop,2,7,1                ! Use original area so load is constant in large deformation
esel,all
/com,*********** Define Force Using Surface Effect Elements ***********
local,13,0,0.,0.,0.,0.,0.,0.
csys,0
et,3,154
eblock,10,,,102
(15i9)
    13906        3        3        3       13    11086    11076    11090    11090
    13907        3        3        3       13    11089    11088       40       41
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-1
esel,s,type,,3
keyop,3,2,1                ! Apply load in local coordinate system
keyop,3,7,1                ! Use original area so load is constant in large deformation
keyop,3,11,2               ! Use real and not project area
esel,all
fini
/com,****************************************************************************
/com,*************************    SOLUTION       ********************************
/com,****************************************************************************
/solu
antype,0                   ! static analysis
_thickRatio=  0     ! Ratio of thick parts in the model
eqsl,sparse,,,,,1
cntr,print,1               ! print out contact info and also make no initial contact an error
dmpoption,emat,no             ! Don't combine emat file for DANSYS
dmpoption,esav,no             ! Don't combine esav file for DANSYS
nldiag,cont,iter           ! print out contact info each equilibrium iteration
rescontrol,,none                 ! Do not keep any restart files
/com,****************************************************
/com,******************* SOLVE FOR LS 1 OF 1 ****************
esel,s,type,,2
nsle
sfe,all,1,pres,1,77782.1089464089
sfe,all,2,pres,1,18149.1587541621
sfe,all,3,pres,1,0.
esel,s,type,,3
nsle
sfe,all,1,pres,1,0.
sfe,all,2,pres,1,-2004865.4384347
sfe,all,3,pres,1,13210353.6641046
nsel,all
esel,all
nsub,1,1,1
time,1.
outres,erase
outres,all,none
outres,nsol,all,
outres,rsol,all
outres,eangl,all
outres,etmp,all
outres,veng,all
outres,strs,all,
outres,epel,all,
outres,eppl,all,
outres,cont,all,
! *********** WB SOLVE COMMAND ***********
! check interactive state
*get,ANSINTER_,active,,int
*if,ANSINTER_,ne,0,then
/eof
*endif
solve
/com *************** Write FE CONNECTORS *********
CEWRITE,file,ce,,INTE
/com,****************************************************
/com,*************** FINISHED SOLVE FOR LS 1 *************
/post1
fini
